// SBML level 3 version 1

model putida_core()

  // Compartments:
  compartment default_compartment = 1;
  compartment c = 1;
  compartment e = 1;

  // Species:
  species M_2ddg6p_c in c = 0.7057897; M_2ddg6p_c is "2-dehydro-3-deoxy-D-gluconate 6-phosphate";
  species M_2dhglcn_c in c = 0.7367059; M_2dhglcn_c is "2-Dehydro-D-gluconate";
  species M_3dhq_c in c = 0.6690308; M_3dhq_c is "3-dehydroquinate";
  species M_3dhsk_c in c = 0.4483795; M_3dhsk_c is "3-dehydroshikimate";
  species M_3pg_c in c = 0.179111; M_3pg_c is "3-Phospho-D-glycerate";
  species M_6pgc_c in c = 0.5213138; M_6pgc_c is "6-Phospho-D-gluconate";
  species M_accoa_c in c = 0.01906305; M_accoa_c is "Acetyl-CoA";
  species M_acon_c in c = 0.01868593; M_acon_c is "cis-Aconitate";
  species M_adp_c in c = 0.421901755; M_adp_c is "ADP";
  species M_akg_c in c = 0.5531345; M_akg_c is "2-Oxoglutarate";
  species M_atp_c in c = 0.4257262; M_atp_c is "ATP";
  species M_catechol_c in c = 0.0383608419;
  species $M_ccmuac_c in c = 0.1604952; M_ccmuac_c is "cis,cis-muconate";
  species M_cit_c in c = 0.7644602; M_cit_c is "Citrate";
  species M_co2_c in c = 0.08550737; M_co2_c is "CO2";
  species $M_co2_e in e = 0.3101432; M_co2_e is "CO2";
  species M_coa_c in c = 0.550249993; M_coa_c is "Coenzyme A";
  species M_dhap_c in c = 0.679446; M_dhap_c is "Dihydroxyacetone phosphate";
  species M_e4p_c in c = 0.9599283; M_e4p_c is "D-Erythrose 4-phosphate";
  species M_f6p_c in c = 0.005863483; M_f6p_c is "D-Fructose 6-phosphate";
  species M_fdp_c in c = 0.969583869; M_fdp_c is "D-Fructose 1,6-bisphosphate";
  species M_fum_c in c = 0.03998546; M_fum_c is "Fumarate";
  species M_g3p_c in c = 0.05478684; M_g3p_c is "Glyceraldehyde 3-phosphate";
  species M_g6p_c in c = 0.2994662; M_g6p_c is "D-Glucose 6-phosphate";
  species M_glc__D_c in c = 0.04645244; M_glc__D_c is "D-Glucose";
  species $M_glc__D_e in e = 0.9056906; M_glc__D_e is "D-Glucose (p)";
  species M_glcn_c in c = 0.5546186; M_glcn_c is "D-Gluconate";
  species M_gln__L_c in c = 0.393592952; M_gln__L_c is "L-Glutamine";
  species M_glu__L_c in c = 0.6888716; M_glu__L_c is "L-Glutamate";
  species M_glx_c in c = 0.1841601; M_glx_c is "Glyoxylate";
  species M_h2o_c in c = 0.6750081; M_h2o_c is "H2O";
  species $M_h2o_e in e = 0.6182407; M_h2o_e is "H2O";
  species M_h_c in c = 0.1975639; M_h_c is "H+";
  species $M_h_e in e = 0.5210584; M_h_e is "H+";
  species M_hco3_c in c = 0.9107613; M_hco3_c is "hydrogen carbonate";
  species M_icit_c in c = 0.4955701; M_icit_c is "Isocitrate";
  species M_mal__L_c in c = 0.1665701; M_mal__L_c is "L-Malate";
  species M_nad_c in c = 0.1164425; M_nad_c is "Nicotinamide adenine dinucleotide";
  species M_nadh_c in c = 0.7339217; M_nadh_c is "Nicotinamide adenine dinucleotide - reduced";
  species M_nadp_c in c = 0.6424747; M_nadp_c is "Nicotinamide adenine dinucleotide phosphate";
  species M_nadph_c in c = 0.01926718; M_nadph_c is "Nicotinamide adenine dinucleotide phosphate - reduced";
  species M_nh4_c in c = 0.4019366; M_nh4_c is "Ammonium";
  species $M_nh4_e in e = 0.9528451; M_nh4_e is "Ammonium";
  species M_o2_c in c = 0.3913149; M_o2_c is "O2";
  species $M_o2_e in e = 0.4500892; M_o2_e is "O2";
  species M_oaa_c in c = 0.2127709; M_oaa_c is "Oxaloacetate";
  species M_pep_c in c = 0.8820201; M_pep_c is "Phosphoenolpyruvate";
  species M_pi_c in c = 0.0492549438; M_pi_c is "Phosphate";
  species $M_pi_e in e = 0.7463447; M_pi_e is "Phosphate";
  species M_pyr_c in c = 0.1193623; M_pyr_c is "Pyruvate";
  species $M_pyr_e in e = 0.1920501; M_pyr_e is "Pyruvate";
  species M_q8_c in c = 0.7879345; M_q8_c is "Ubiquinone-8";
  species M_q8h2_c in c = 0.9498789; M_q8h2_c is "Ubiquinol-8";
  species M_r5p_c in c = 0.9450299; M_r5p_c is "alpha-D-Ribose 5-phosphate";
  species M_ru5p__D_c in c = 0.810188931; M_ru5p__D_c is "D-Ribulose 5-phosphate";
  species M_s7p_c in c = 0.2577425; M_s7p_c is "Sedoheptulose 7-phosphate";
  species M_succ_c in c = 0.08493027; M_succ_c is "Succinate";
  species $M_succ_e in e = 0.6896039; M_succ_e is "Succinate";
  species M_xu5p__D_c in c = 0.5240476; M_xu5p__D_c is "D-Xylulose 5-phosphate";
  species M_shik_c in default_compartment = 0.21497; M_shik_c is "shikimate";
  species M_shik3p_c in default_compartment = 0.149122; M_shik3p_c is "shikimate 3-phosphate";
  species M_5eps3p_c in default_compartment = 0.4912; M_5eps3p_c is "5-enolpyruvylshikimate 3-phosphate";
  species M_chor_c in default_compartment = 0.91228; M_chor_c is "chorismate";
  species M_4a4dch_c in default_compartment = 0.1228; M_4a4dch_c is "4-amino-4-deoxychorismate";
  species M_4a4dpr_c in default_compartment = 0.22807; M_4a4dpr_c is "4-amino-4-deoxyprephenate";
  species M_4aPPA_c in default_compartment = 0.2807; M_4aPPA_c is "4-amino-PPA";
  species M_4aPhe_c in default_compartment = 0.80701; M_4aPhe_c is "4-aminophenylalanine";
  species $M_4acinna_c in default_compartment = 0.001; M_4acinna_c is "4-aminocinnamic acid";

  // Parameters:
  e1 = 1;
  Km = 0.06392707;
  e2 = 1;
  Km1 = 0.715329913;
  e3 = 1;
  Km3 = 0.67866575;
  e4 = 1;
  Km5 = 0.782065548;
  e5 = 1;
  Km7 = 0.813295904;
  e6 = 1;
  Km9 = 0.470134834;
  e7 = 1;
  Km11 = 0.92212873;
  e8 = 1;
  Km13 = 0.705400332;
  e9 = 1;
  Km15 = 0.572365451;
  e10 = 1;
  Km17 = 0.093867628;
  e11 = 1;
  Km19 = 0.703846517;
  Km20 = 0.162572136;
  e12 = 1;
  Km21 = 0.528636289;
  Km22 = 0.020545321;
  e13 = 1;
  Km23 = 0.997193288;
  Km24 = 0.554534868;
  e14 = 1;
  Km25 = 0.310826652;
  Km26 = 0.615678812;
  e15 = 1;
  Km27 = 0.576248607;
  Km28 = 0.38731537;
  e16 = 1;
  Km29 = 0.269104857;
  Km30 = 0.144431589;
  e17 = 1;
  Km31 = 0.043609458;
  Km32 = 0.496774238;
  e18 = 1;
  Km33 = 0.356465497;
  Km34 = 0.731349853;
  e19 = 1;
  Km35 = 0.804302567;
  Km36 = 0.943532307;
  e20 = 1;
  Km37 = 0.674395439;
  Km38 = 0.89340556;
  e21 = 1;
  Km39 = 0.500289906;
  Km40 = 0.334757355;
  e22 = 1;
  Km41 = 0.526511573;
  Km42 = 0.174884417;
  e23 = 1;
  Km43 = 0.194987233;
  Km44 = 0.175260292;
  e25 = 1;
  Km47 = 0.640615383;
  Km48 = 0.531952464;
  e26 = 1;
  Km49 = 0.796415757;
  Km50 = 0.0324991;
  e27 = 1;
  Km51 = 0.458485585;
  Km52 = 0.304994501;
  e28 = 1;
  Km53 = 0.274335147;
  Km54 = 0.466893428;
  e29 = 1;
  Km55 = 0.74061545;
  Km56 = 0.902368482;
  e30 = 1;
  Km57 = 0.882038322;
  Km58 = 0.300470914;
  e31 = 1;
  Km59 = 0.498724539;
  Km60 = 0.494398949;
  e32 = 1;
  Km61 = 0.629236404;
  Km62 = 0.183442318;
  e33 = 1;
  Km63 = 0.20841891;
  Km64 = 0.679849167;
  e34 = 1;
  Km65 = 0.725608349;
  Km66 = 0.742347552;
  e35 = 1;
  Km67 = 0.325572128;
  Km68 = 0.547677675;
  e36 = 1;
  Km69 = 0.161689162;
  Km70 = 0.332118443;
  e37 = 1;
  Km71 = 0.000176637;
  Km72 = 0.818803866;
  e38 = 1;
  Km73 = 0.780518749;
  Km74 = 0.355369872;
  e39 = 1;
  Km75 = 0.467971015;
  Km76 = 0.264487759;
  e40 = 1;
  Km77 = 0.86740806;
  Km78 = 0.070192695;
  e41 = 1;
  Km79 = 0.178125914;
  Km80 = 0.014560707;
  e42 = 1;
  Km81 = 0.860910632;
  Km82 = 0.170000341;
  e43 = 1;
  Km83 = 0.728952574;
  Km84 = 0.590314961;
  e44 = 1;
  Km85 = 0.509097316;
  Km86 = 0.296703746;
  e45 = 1;
  Km87 = 0.180983973;
  Km88 = 0.252060041;
  e46 = 1;
  Km89 = 0.88660008;
  Km90 = 0.373910323;
  e47 = 1;
  Km91 = 0.644844662;
  Km92 = 0.122791447;
  e48 = 1;
  Km93 = 0.428895523;
  Km94 = 0.834222278;
  e49 = 1;
  Km95 = 0.751789894;
  Km96 = 0.326971367;
  e50 = 1;
  Km97 = 0.949944019;
  Km98 = 0.623051879;
  e51 = 1;
  Km99 = 0.52452154;
  Km100 = 0.111622209;
  e52 = 1;
  Km101 = 0.754365105;
  Km102 = 0.426739273;
  e53 = 1;
  Km103 = 0.94560111;
  Km104 = 0.900386818;
  e54 = 1;
  Km105 = 0.754315439;
  Km106 = 0.463248868;
  e55 = 1;
  Km107 = 0.311052372;
  Km108 = 0.614902274;
  e56 = 1;
  Km109 = 0.77937075;
  Km110 = 0.624874609;
  e57 = 1;
  Km111 = 0.372420688;
  Km112 = 0.904344853;
  e58 = 1;
  Km113 = 0.438305062;
  Km114 = 0.859759852;
  e59 = 1;
  Km115 = 0.854746813;
  Km116 = 0.304001043;
  e60 = 1;
  Km117 = 0.851217009;
  Km118 = 0.189315697;
  e61 = 1;
  Km119 = 0.810392664;
  Km120 = 0.982757116;
  e62 = 1;
  Km121 = 0.190027884;
  Km122 = 0.244755716;
  e63 = 1;
  Km123 = 0.37996137;
  Km124 = 0.034559708;
  e64 = 1;
  Km125 = 0.170927187;
  Km126 = 0.371436695;
  e66 = 1;
  Km129 = 0.343934305;
  Km130 = 0.188796082;
  e67 = 1;
  Km131 = 0.361563197;
  Km132 = 0.84793024;
  e68 = 1;
  Km133 = 0.995777533;
  Km134 = 0.099404102;
  e69 = 1;
  Km135 = 0.286026759;
  Km136 = 0.516484304;
  e70 = 1;
  Km137 = 0.707459825;
  Km138 = 0.042014636;
  e71 = 1;
  Km139 = 0.710565911;
  Km140 = 0.534516814;
  e73 = 1;
  Km143 = 0.738475239;
  Km144 = 0.89785928;
  e74 = 1;
  Km145 = 0.026591312;
  Km146 = 0.776549805;
  e75 = 1;
  Km147 = 0.061924133;
  Km148 = 0.508083251;
  e76 = 1;
  Km149 = 0.925899193;
  Km150 = 0.983663199;
  e77 = 1;
  Km151 = 0.968111166;
  Km152 = 0.568326975;
  e78 = 1;
  Km153 = 0.95863854;
  Km154 = 0.218322081;
  e79 = 1;
  Km155 = 0.322176979;
  Km156 = 0.26738122;
  e80 = 1;
  Km157 = 0.296934185;
  Km158 = 0.174088593;
  e81 = 1;
  Km159 = 0.688771422;
  Km160 = 0.555926525;
  e82 = 1;
  e83 = 1;
  cobra_default_lb = -1000;
  cobra_default_ub = 999999;
  cobra_0_bound = 0;
  minus_inf = -INF;
  plus_inf = INF;
  R_ATPM_lower_bound = 8.39 mmol_per_gDW_per_hr;
  R_EX_glc_e_lower_bound = -7.03 mmol_per_gDW_per_hr;
  R_GLCabcpp_upper_bound = 999999 mmol_per_gDW_per_hr;
  R_GNK_upper_bound = 999999 mmol_per_gDW_per_hr;
  R_HEX1_upper_bound = 999999 mmol_per_gDW_per_hr;

  // Reactions:
  R_muconate_sink: $M_ccmuac_c => ; e1*0.7592/Km - 1*M_ccmuac_c/(1 + M_ccmuac_c/Km - 1);
  R_EX_co2_e: $M_co2_e -> ; e2*0.7655/Km1*M_co2_e/(1 + M_co2_e/Km1);
  R_EX_glc_e: $M_glc__D_e -> ; e3*0.3198/Km3*M_glc__D_e/(1 + M_glc__D_e/Km3);
  R_EX_h2o_e: $M_h2o_e -> ; e4*0.5796/Km5*M_h2o_e/(1 + M_h2o_e/Km5);
  R_EX_h_e: $M_h_e -> ; e5*0.6846/Km7*M_h_e/(1 + M_h_e/Km7);
  R_EX_nh4_e: $M_nh4_e -> ; e6*0.9662/Km9*M_nh4_e/(1 + M_nh4_e/Km9);
  R_EX_o2_e: $M_o2_e -> ; e7*0.6266/Km11*M_o2_e/(1 + M_o2_e/Km11);
  R_EX_pi_e: $M_pi_e -> ; e8*0.2172/Km13*M_pi_e/(1 + M_pi_e/Km13);
  R_EX_pyr_e: $M_pyr_e => ; e9*0.971/Km15*M_pyr_e/(1 + M_pyr_e/Km15);
  R_EX_succ_e: $M_succ_e => ; e10*0.3664/Km17*M_succ_e/(1 + M_succ_e/Km17);
  R_NH4t: $M_nh4_e -> M_nh4_c; e11*0.451/Km19*(M_nh4_e - M_nh4_c/0.1199)/(1 + M_nh4_e/Km19 + M_nh4_c/Km20);
  R_CO2t: $M_co2_e -> M_co2_c; e12*0.3809/Km21*(M_co2_e - M_co2_c/0.2889)/(1 + M_co2_e/Km21 + M_co2_c/Km22);
  R_O2t: $M_o2_e -> M_o2_c; e13*0.9777/Km23*(M_o2_e - M_o2_c/0.4639)/(1 + M_o2_e/Km23 + M_o2_c/Km24);
  R_H2Ot: $M_h2o_e -> M_h2o_c; e14*0.5136/Km25*(M_h2o_e - M_h2o_c/0.6871)/(1 + M_h2o_e/Km25 + M_h2o_c/Km26);
  R_PIt2r: $M_h_e + $M_pi_e => M_h_c + M_pi_c; e15*0.8099/Km27*(M_h_e*M_pi_e - M_h_c*M_pi_c/0.8727)/(1 + M_h_e*M_pi_e/Km27 + M_h_c*M_pi_c/Km28);
  R_PYRt2: $M_h_e + $M_pyr_e -> M_h_c + M_pyr_c; e16*0.267/Km29*(M_h_e*M_pyr_e - M_h_c*M_pyr_c/0.2804)/(1 + M_h_e*M_pyr_e/Km29 + M_h_c*M_pyr_c/Km30);
  R_SUCCt2_2: 2 $M_h_e + $M_succ_e => 2 M_h_c + M_succ_c; e17*0.0312/Km31*(M_h_e^2*M_succ_e - M_h_c^2*M_succ_c/0.5312)/(1 + M_h_e^2*M_succ_e/Km31 + M_h_c^2*M_succ_c/Km32);
  R_SUCCt3: $M_h_e + M_succ_c => M_h_c + $M_succ_e; e18*0.2265/Km33*(M_h_e*M_succ_c - M_h_c*M_succ_e/0.9554)/(1 + M_h_e*M_succ_c/Km33 + M_h_c*M_succ_e/Km34);
  R_THD2: $M_h_e + M_nadh_c + M_nadp_c => M_h_c + M_nad_c + M_nadph_c; e19*0.7902/Km35*(M_h_e*M_nadh_c*M_nadp_c - M_h_c*M_nad_c*M_nadph_c/0.4398)/(1 + M_h_e*M_nadh_c*M_nadp_c/Km35 + M_h_c*M_nad_c*M_nadph_c/Km36);
  R_ATPM: M_atp_c + M_h2o_c => M_adp_c + M_h_c + M_pi_c; e20*0.1715/Km37*(M_atp_c*M_h2o_c - M_adp_c*M_h_c*M_pi_c/0.8627)/(1 + M_atp_c*M_h2o_c/Km37 + M_adp_c*M_h_c*M_pi_c/Km38);
  R_ATPS4r: M_atp_c + M_h2o_c + 3 M_h_c -> M_adp_c + 4 $M_h_e + M_pi_c; e21*0.7611/Km39*(M_atp_c*M_h2o_c*M_h_c^3 - M_adp_c*M_h_e^4*M_pi_c/0.6071)/(1 + M_atp_c*M_h2o_c*M_h_c^3/Km39 + M_adp_c*M_h_e^4*M_pi_c/Km40);
  R_HCO3E: M_h_c + M_hco3_c -> M_co2_c + M_h2o_c; e22*0.9203/Km41*(M_h_c*M_hco3_c - M_co2_c*M_h2o_c/0.5795)/(1 + M_h_c*M_hco3_c/Km41 + M_co2_c*M_h2o_c/Km42);
  R_NADTRHD: M_nad_c + M_nadph_c -> M_nadh_c + M_nadp_c; e23*0.6675/Km43*(M_nad_c*M_nadph_c - M_nadh_c*M_nadp_c/0.2638)/(1 + M_nad_c*M_nadph_c/Km43 + M_nadh_c*M_nadp_c/Km44);
  R_ACONTa: M_cit_c -> M_acon_c + M_h2o_c; e25*0.2035/Km47*(M_cit_c - M_acon_c*M_h2o_c/0.4333)/(1 + M_cit_c/Km47 + M_acon_c*M_h2o_c/Km48);
  R_ACONTb: M_acon_c + M_h2o_c -> M_icit_c; e26*0.9913/Km49*(M_acon_c*M_h2o_c - M_icit_c/0.5886)/(1 + M_acon_c*M_h2o_c/Km49 + M_icit_c/Km50);
  R_CATDOX: M_catechol_c + M_o2_c => $M_ccmuac_c + 2 M_h_c; e27*0.0457/Km51*(M_catechol_c*M_o2_c - M_ccmuac_c*M_h_c^2/0.833)/(1 + M_catechol_c*M_o2_c/Km51 + M_ccmuac_c*M_h_c^2/Km52);
  R_CS: M_accoa_c + M_h2o_c + M_oaa_c => M_cit_c + M_coa_c + M_h_c; e28*0.3346/Km53*(M_accoa_c*M_h2o_c*M_oaa_c - M_cit_c*M_coa_c*M_h_c/0.2088)/(1 + M_accoa_c*M_h2o_c*M_oaa_c/Km53 + M_cit_c*M_coa_c*M_h_c/Km54);
  R_CYTBD: 2 M_h_c + 1.5 M_o2_c + M_q8h2_c => M_h2o_c + 2 $M_h_e + M_q8_c; e29*0.6916/Km55*(M_h_c^2*M_o2_c^1.5*M_q8h2_c - M_h2o_c*M_h_e^2*M_q8_c/0.5209)/(1 + M_h_c^2*M_o2_c^1.5*M_q8h2_c/Km55 + M_h2o_c*M_h_e^2*M_q8_c/Km56);
  R_DHQTi: M_3dhq_c -> M_3dhsk_c + M_h2o_c; e30*0.4644/Km57*(M_3dhq_c - M_3dhsk_c*M_h2o_c/0.258)/(1 + M_3dhq_c/Km57 + M_3dhsk_c*M_h2o_c/Km58);
  R_ENO: M_3pg_c -> M_h2o_c + M_pep_c; e31*0.4202/Km59*(M_3pg_c - M_h2o_c*M_pep_c/0.3662)/(1 + M_3pg_c/Km59 + M_h2o_c*M_pep_c/Km60);
  R_FBA: M_fdp_c -> M_dhap_c + M_g3p_c; e32*0.2596/Km61*(M_fdp_c - M_dhap_c*M_g3p_c/0.8733)/(1 + M_fdp_c/Km61 + M_dhap_c*M_g3p_c/Km62);
  R_FBP: M_fdp_c + M_h2o_c => M_f6p_c + M_pi_c; e33*0.8985/Km63*(M_fdp_c*M_h2o_c - M_f6p_c*M_pi_c/0.5382)/(1 + M_fdp_c*M_h2o_c/Km63 + M_f6p_c*M_pi_c/Km64);
  R_G6PDH2r: M_g6p_c + M_h2o_c + M_nadp_c => M_6pgc_c + 2 M_h_c + M_nadph_c; e34*0.4417/Km65*(M_g6p_c*M_h2o_c*M_nadp_c - M_6pgc_c*M_h_c^2*M_nadph_c/0.7773)/(1 + M_g6p_c*M_h2o_c*M_nadp_c/Km65 + M_6pgc_c*M_h_c^2*M_nadph_c/Km66);
  R_GADktpp: M_glcn_c + M_nad_c => M_2dhglcn_c + M_h_c + M_nadh_c; e35*0.9691/Km67*(M_glcn_c*M_nad_c - M_2dhglcn_c*M_h_c*M_nadh_c/0.4588)/(1 + M_glcn_c*M_nad_c/Km67 + M_2dhglcn_c*M_h_c*M_nadh_c/Km68);
  R_GAPD: M_adp_c + M_g3p_c + M_nad_c + M_pi_c -> M_3pg_c + M_atp_c + M_h_c + M_nadh_c; e36*0.7113/Km69*(M_adp_c*M_g3p_c*M_nad_c*M_pi_c - M_3pg_c*M_atp_c*M_h_c*M_nadh_c/0.5312)/(1 + M_adp_c*M_g3p_c*M_nad_c*M_pi_c/Km69 + M_3pg_c*M_atp_c*M_h_c*M_nadh_c/Km70);
  R_GLCDpp: M_glc__D_c + $M_h2o_e + M_q8_c => M_glcn_c + $M_h_e + M_q8h2_c; e37*0.4508/Km71*(M_glc__D_c*M_h2o_e*M_q8_c - M_glcn_c*M_h_e*M_q8h2_c/0.7581)/(1 + M_glc__D_c*M_h2o_e*M_q8_c/Km71 + M_glcn_c*M_h_e*M_q8h2_c/Km72);
  R_GLNS: M_atp_c + M_glu__L_c + M_nh4_c => M_adp_c + M_gln__L_c + M_h_c + M_pi_c; e38*0.2219/Km73*(M_atp_c*M_glu__L_c*M_nh4_c - M_adp_c*M_gln__L_c*M_h_c*M_pi_c/0.3877)/(1 + M_atp_c*M_glu__L_c*M_nh4_c/Km73 + M_adp_c*M_gln__L_c*M_h_c*M_pi_c/Km74);
  R_GLUDy: M_glu__L_c + M_h2o_c + M_nadp_c -> M_akg_c + M_h_c + M_nadph_c + M_nh4_c; e39*0.0402/Km75*(M_glu__L_c*M_h2o_c*M_nadp_c - M_akg_c*M_h_c*M_nadph_c*M_nh4_c/0.6949)/(1 + M_glu__L_c*M_h2o_c*M_nadp_c/Km75 + M_akg_c*M_h_c*M_nadph_c*M_nh4_c/Km76);
  R_GLUN: M_gln__L_c + M_h2o_c => M_glu__L_c + M_nh4_c; e40*0.9004/Km77*(M_gln__L_c*M_h2o_c - M_glu__L_c*M_nh4_c/0.3347)/(1 + M_gln__L_c*M_h2o_c/Km77 + M_glu__L_c*M_nh4_c/Km78);
  R_GLUSy: M_akg_c + M_gln__L_c + M_h_c + M_nadph_c => 2 M_glu__L_c + M_nadp_c; e41*0.3031/Km79*(M_akg_c*M_gln__L_c*M_h_c*M_nadph_c - M_glu__L_c^2*M_nadp_c/0.0276)/(1 + M_akg_c*M_gln__L_c*M_h_c*M_nadph_c/Km79 + M_glu__L_c^2*M_nadp_c/Km80);
  R_GND: M_6pgc_c + M_nadp_c => M_co2_c + M_nadph_c + M_ru5p__D_c; e42*0.7077/Km81*(M_6pgc_c*M_nadp_c - M_co2_c*M_nadph_c*M_ru5p__D_c/0.84)/(1 + M_6pgc_c*M_nadp_c/Km81 + M_co2_c*M_nadph_c*M_ru5p__D_c/Km82);
  R_GNK: M_atp_c + M_glcn_c => M_6pgc_c + M_adp_c + M_h_c; e43*0.2898/Km83*(M_atp_c*M_glcn_c - M_6pgc_c*M_adp_c*M_h_c/0.8071)/(1 + M_atp_c*M_glcn_c/Km83 + M_6pgc_c*M_adp_c*M_h_c/Km84);
  R_ICDHyr: M_icit_c + M_nadp_c -> M_akg_c + M_co2_c + M_nadph_c; e44*0.4016/Km85*(M_icit_c*M_nadp_c - M_akg_c*M_co2_c*M_nadph_c/0.101)/(1 + M_icit_c*M_nadp_c/Km85 + M_akg_c*M_co2_c*M_nadph_c/Km86);
  R_KDPGALDOL: M_2ddg6p_c => M_g3p_c + M_pyr_c; e45*0.4524/Km87*(M_2ddg6p_c - M_g3p_c*M_pyr_c/0.5635)/(1 + M_2ddg6p_c/Km87 + M_g3p_c*M_pyr_c/Km88);
  R_MDH: M_mal__L_c + M_nad_c -> M_h_c + M_nadh_c + M_oaa_c; e46*0.2885/Km89*(M_mal__L_c*M_nad_c - M_h_c*M_nadh_c*M_oaa_c/0.2501)/(1 + M_mal__L_c*M_nad_c/Km89 + M_h_c*M_nadh_c*M_oaa_c/Km90);
  R_ME1: M_mal__L_c + M_nad_c => M_co2_c + M_nadh_c + M_pyr_c; e47*0.1203/Km91*(M_mal__L_c*M_nad_c - M_co2_c*M_nadh_c*M_pyr_c/0.2666)/(1 + M_mal__L_c*M_nad_c/Km91 + M_co2_c*M_nadh_c*M_pyr_c/Km92);
  R_ME2: M_mal__L_c + M_nadp_c => M_co2_c + M_nadph_c + M_pyr_c; e48*0.1521/Km93*(M_mal__L_c*M_nadp_c - M_co2_c*M_nadph_c*M_pyr_c/0.6134)/(1 + M_mal__L_c*M_nadp_c/Km93 + M_co2_c*M_nadph_c*M_pyr_c/Km94);
  R_NADH16: 4 M_h_c + M_nadh_c + M_q8_c => 3 $M_h_e + M_nad_c + M_q8h2_c; e49*0.6336/Km95*(M_h_c^4*M_nadh_c*M_q8_c - M_h_e^3*M_nad_c*M_q8h2_c/0.5713)/(1 + M_h_c^4*M_nadh_c*M_q8_c/Km95 + M_h_e^3*M_nad_c*M_q8h2_c/Km96);
  R_PC: M_atp_c + M_hco3_c + M_pyr_c => M_adp_c + M_h_c + M_oaa_c + M_pi_c; e50*0.7614/Km97*(M_atp_c*M_hco3_c*M_pyr_c - M_adp_c*M_h_c*M_oaa_c*M_pi_c/0.0644)/(1 + M_atp_c*M_hco3_c*M_pyr_c/Km97 + M_adp_c*M_h_c*M_oaa_c*M_pi_c/Km98);
  R_PDH: M_coa_c + M_nad_c + M_pyr_c -> M_accoa_c + M_co2_c + M_nadh_c; e51*0.0072/Km99*(M_coa_c*M_nad_c*M_pyr_c - M_accoa_c*M_co2_c*M_nadh_c/0.8797)/(1 + M_coa_c*M_nad_c*M_pyr_c/Km99 + M_accoa_c*M_co2_c*M_nadh_c/Km100);
  R_PGI: M_g6p_c -> M_f6p_c; e52*0.7563/Km101*(M_g6p_c - M_f6p_c/0.5056)/(1 + M_g6p_c/Km101 + M_f6p_c/Km102);
  R_PGLUCONDEHYDRAT: M_6pgc_c => M_2ddg6p_c + M_h2o_c; e53*0.7445/Km103*(M_6pgc_c - M_2ddg6p_c*M_h2o_c/0.9485)/(1 + M_6pgc_c/Km103 + M_2ddg6p_c*M_h2o_c/Km104);
  R_PPC: M_hco3_c + M_pep_c => M_oaa_c + M_pi_c; e54*0.9584/Km105*(M_hco3_c*M_pep_c - M_oaa_c*M_pi_c/0.7637)/(1 + M_hco3_c*M_pep_c/Km105 + M_oaa_c*M_pi_c/Km106);
  R_PPCK: M_atp_c + M_oaa_c => M_adp_c + M_co2_c + M_pep_c; e55*0.9534/Km107*(M_atp_c*M_oaa_c - M_adp_c*M_co2_c*M_pep_c/0.8695)/(1 + M_atp_c*M_oaa_c/Km107 + M_adp_c*M_co2_c*M_pep_c/Km108);
  R_PYK: M_adp_c + M_h_c + M_pep_c => M_atp_c + M_pyr_c; e56*0.8693/Km109*(M_adp_c*M_h_c*M_pep_c - M_atp_c*M_pyr_c/0.9171)/(1 + M_adp_c*M_h_c*M_pep_c/Km109 + M_atp_c*M_pyr_c/Km110);
  R_RPE: M_ru5p__D_c -> M_xu5p__D_c; e57*0.916/Km111*(M_ru5p__D_c - M_xu5p__D_c/0.9885)/(1 + M_ru5p__D_c/Km111 + M_xu5p__D_c/Km112);
  R_RPI: M_r5p_c -> M_ru5p__D_c; e58*0.2707/Km113*(M_r5p_c - M_ru5p__D_c/0.5307)/(1 + M_r5p_c/Km113 + M_ru5p__D_c/Km114);
  R_TALA: M_g3p_c + M_s7p_c -> M_e4p_c + M_f6p_c; e59*0.7332/Km115*(M_g3p_c*M_s7p_c - M_e4p_c*M_f6p_c/0.5608)/(1 + M_g3p_c*M_s7p_c/Km115 + M_e4p_c*M_f6p_c/Km116);
  R_TKT1: M_g3p_c + M_s7p_c -> M_r5p_c + M_xu5p__D_c; e60*0.2531/Km117*(M_g3p_c*M_s7p_c - M_r5p_c*M_xu5p__D_c/0.3239)/(1 + M_g3p_c*M_s7p_c/Km117 + M_r5p_c*M_xu5p__D_c/Km118);
  R_TKT2: M_e4p_c + M_xu5p__D_c -> M_f6p_c + M_g3p_c; e61*0.3346/Km119*(M_e4p_c*M_xu5p__D_c - M_f6p_c*M_g3p_c/0.1491)/(1 + M_e4p_c*M_xu5p__D_c/Km119 + M_f6p_c*M_g3p_c/Km120);
  R_TPI: M_g3p_c -> M_dhap_c; e62*0.701/Km121*(M_g3p_c - M_dhap_c/0.6754)/(1 + M_g3p_c/Km121 + M_dhap_c/Km122);
  R_MALS: M_accoa_c + M_glx_c + M_h2o_c => M_coa_c + M_h_c + M_mal__L_c; e63*0.4939/Km123*(M_accoa_c*M_glx_c*M_h2o_c - M_coa_c*M_h_c*M_mal__L_c/0.9307)/(1 + M_accoa_c*M_glx_c*M_h2o_c/Km123 + M_coa_c*M_h_c*M_mal__L_c/Km124);
  R_FUM: M_fum_c + M_h2o_c -> M_mal__L_c; e64*0.6326/Km125*(M_fum_c*M_h2o_c - M_mal__L_c/0.0308)/(1 + M_fum_c*M_h2o_c/Km125 + M_mal__L_c/Km126);
  R_GLCabcpp_HEX1: 2 M_atp_c + $M_glc__D_e + M_h2o_c => 2 M_adp_c + M_g6p_c + 2 M_h_c + M_pi_c; e66*0.9956/Km129*(M_atp_c^2*M_glc__D_e*M_h2o_c - M_adp_c^2*M_g6p_c*M_h_c^2*M_pi_c/0.2865)/(1 + M_atp_c^2*M_glc__D_e*M_h2o_c/Km129 + M_adp_c^2*M_g6p_c*M_h_c^2*M_pi_c/Km130);
  R_2DHGLCK_PGLCNDH: M_2dhglcn_c + M_atp_c + M_nadph_c => M_6pgc_c + M_nadp_c + M_adp_c; e67*0.6539/Km131*(M_2dhglcn_c*M_atp_c*M_nadph_c - M_6pgc_c*M_nadp_c*M_adp_c/0.3222)/(1 + M_2dhglcn_c*M_atp_c*M_nadph_c/Km131 + M_6pgc_c*M_nadp_c*M_adp_c/Km132);
  R_ICL_FRD7: M_icit_c + M_q8_c -> M_glx_c + M_fum_c + M_q8h2_c; e68*0.3415/Km133*(M_icit_c*M_q8_c - M_glx_c*M_fum_c*M_q8h2_c/0.0571)/(1 + M_icit_c*M_q8_c/Km133 + M_glx_c*M_fum_c*M_q8h2_c/Km134);
  R_AKGDH_FRD7: M_q8_c + M_adp_c + M_akg_c + M_nad_c + M_pi_c => M_atp_c + M_co2_c + M_nadh_c + M_fum_c + M_q8h2_c; e69*0.1498/Km135*(M_q8_c*M_adp_c*M_akg_c*M_nad_c*M_pi_c - M_atp_c*M_co2_c*M_nadh_c*M_fum_c*M_q8h2_c/0.3577)/(1 + M_q8_c*M_adp_c*M_akg_c*M_nad_c*M_pi_c/Km135 + M_atp_c*M_co2_c*M_nadh_c*M_fum_c*M_q8h2_c/Km136);
  R_DDPA_DHQS: M_e4p_c + M_h2o_c + M_pep_c -> M_3dhq_c + 2 M_pi_c; e70*0.2435/Km137*(M_e4p_c*M_h2o_c*M_pep_c - M_3dhq_c*M_pi_c^2/0.2028)/(1 + M_e4p_c*M_h2o_c*M_pep_c/Km137 + M_3dhq_c*M_pi_c^2/Km138);
  R_DHSKDH_PCATDC: M_3dhsk_c + M_h_c => M_catechol_c + M_co2_c + M_h2o_c; e71*0.2833/Km139*(M_3dhsk_c*M_h_c - M_catechol_c*M_co2_c*M_h2o_c/0.3286)/(1 + M_3dhsk_c*M_h_c/Km139 + M_catechol_c*M_co2_c*M_h2o_c/Km140);
  R_SHIK: M_3dhsk_c + M_nadph_c -> M_shik_c + M_nadp_c; e73*0.9617/Km143*(M_3dhsk_c*M_nadph_c - M_shik_c*M_nadp_c/0.3358)/(1 + M_3dhsk_c*M_nadph_c/Km143 + M_shik_c*M_nadp_c/Km144);
  R_SHIK3P: M_shik_c + M_atp_c -> M_adp_c + M_shik3p_c; e74*0.8614/Km145*(M_shik_c*M_atp_c - M_adp_c*M_shik3p_c/0.6165)/(1 + M_shik_c*M_atp_c/Km145 + M_adp_c*M_shik3p_c/Km146);
  R_5EPS3P: M_shik3p_c + M_pep_c -> M_5eps3p_c + M_pi_c; e75*0.4395/Km147*(M_shik3p_c*M_pep_c - M_5eps3p_c*M_pi_c/0.9297)/(1 + M_shik3p_c*M_pep_c/Km147 + M_5eps3p_c*M_pi_c/Km148);
  R_CHOR: M_5eps3p_c -> M_chor_c + M_pi_c; e76*0.3029/Km149*(M_5eps3p_c - M_chor_c*M_pi_c/0.4372)/(1 + M_5eps3p_c/Km149 + M_chor_c*M_pi_c/Km150);
  R_PAPA: M_chor_c + M_gln__L_c -> M_4a4dch_c + M_glu__L_c; e77*0.3004/Km151*(M_chor_c*M_gln__L_c - M_4a4dch_c*M_glu__L_c/0.3922)/(1 + M_chor_c*M_gln__L_c/Km151 + M_4a4dch_c*M_glu__L_c/Km152);
  R_PAPB: M_4a4dch_c -> M_4a4dpr_c; e78*0.4039/Km153*(M_4a4dch_c - M_4a4dpr_c/0.4063)/(1 + M_4a4dch_c/Km153 + M_4a4dpr_c/Km154);
  R_PAPC: M_4a4dpr_c + M_nad_c -> M_4aPPA_c + M_nadh_c + M_co2_c + M_h_c; e79*0.8837/Km155*(M_4a4dpr_c*M_nad_c - M_4aPPA_c*M_nadh_c*M_co2_c*M_h_c/0.7859)/(1 + M_4a4dpr_c*M_nad_c/Km155 + M_4aPPA_c*M_nadh_c*M_co2_c*M_h_c/Km156);
  R_TYRB: M_4aPPA_c -> M_4aPhe_c; e80*0.8718/Km157*(M_4aPPA_c - M_4aPhe_c/0.32)/(1 + M_4aPPA_c/Km157 + M_4aPhe_c/Km158);
  R_PAL: M_4aPhe_c -> $M_4acinna_c; e81*0.34/Km159*(M_4aPhe_c - M_4acinna_c/0.211)/(1 + M_4aPhe_c/Km159 + M_4acinna_c/Km160);

  // Unit definitions:
  unit mmol_per_gDW_per_hr = 1e-3 mole / (gram * 3600 second);
end
